<?xml version="1.0"?>
<?xml-stylesheet type="text/xsl" href="http://jsbsim.sourceforge.net/JSBSim.xsl"?>
<fdm_config name="F14A" version="2.0" release="ALPHA"
   xmlns:xsi="http://www.w3.org/2001/XMLSchema-instance"
   xsi:noNamespaceSchemaLocation="http://jsbsim.sourceforge.net/JSBSim.xsd">

 <fileheader>
  <author>Richard Harrison</author>
  <filecreationdate>2014-08-02</filecreationdate>
  <version>1.0</version>
  <description> Models an F14A</description>
    <note>Aircraft origin for measurements is the nose.</note>
    <limitation>Spoilers not modelled in ADA101648 - approximations will be used</limitation>
    <reference
        refID="AFWAL-TR-80-3141"
        author="Donald E. Johnston, David G. Mitchell, Thomas T. Myers"
        title="Invstigation of High-Angle-of-Attack Maneuver-limiting factors, Part I: Anaylsis and simulation"
        date="1980"
    />
    <reference
        refID="AFWAL-TR-80-3141"
        author="Donald E. Johnston, David G. Mitchell, Thomas T. Myers"
        title="Invstigation of High-Angle-of-Attack Maneuver-limiting factors, Part III: Appendices aerodynamic models"
        date="1980"
    />
    <reference
        refID="NASA TN D-6909"
        author="Sue B. Grafton and Ernie L. Anglin"
        title="DYNAMIC STABILITY DERIVATIVES AT ANGLES OF ATTACK FROM -5deg TO 90deg FOR A VARIABLE-SWEEP FIGHTER CONFIGURATION WITH TWIN VERTICAL TAILS"
        date="1972"
    />
 </fileheader>

<!--
  File:     f14a.xml
  Inputs:
    name:          F14A
    type:          two-engine transonic/supersonic fighter
    max weight:    74350 lb
    wing span:     64 ft
    length:        62.75 ft
    wing area:     54.5 sq-ft
    gear type:     tricycle
    retractable?:  yes
    # engines:     2
    engine type:   turbine
    engine layout: middle fuselage
    yaw damper?    yes
  Outputs:
    wing loading:  1364.22 lb/sq-ft
    payload:       58954.8 lbs
    CL-alpha:      3.6 per radian
    CL-0:          0.08
    CL-max:        1
    CD-0:          0.024
    K:             0.12

-->

 <metrics>
   <wingarea  unit="FT2">   565 </wingarea>
   <wingspan  unit="FT" >   64.00 </wingspan>
   <wing_incidence>          2.00 </wing_incidence>

   <chord     unit="FT" >    9.8166666666666666666666666666667 </chord>
   <htailarea unit="FT2">  140.00 </htailarea>
   <htailarm  unit="FT" >   25.10 </htailarm>
   <vtailarea unit="FT2">  118.00 </vtailarea> <!-- 59ft2 each -->
   <vtailarm  unit="FT" >   25.10 </vtailarm>

   <location name="AERORP" unit="IN">
     <x> 451.80 </x>
     <y>   0.00 </y>
     <z>   0.00 </z>
   </location>
   <location name="EYEPOINT" unit="IN">
     <x> 150.60 </x>
     <y>   0.00 </y>
     <z>  38.00 </z>
</location>
   <location name="VRP" unit="IN">
     <x>0</x>
     <y>0</y>
     <z>0</z>
   </location>
 </metrics>

 <mass_balance>
   <ixx unit="SLUG*FT2">     58950 </ixx>
   <iyy unit="SLUG*FT2">    225600 </iyy>
   <izz unit="SLUG*FT2">    285000 </izz>
<!-- using GE F110 engines but aero is for F14A -->
   <emptywt unit="LBS" >     40104 </emptywt>
   <location name="CG" unit="IN">
     <x> 451.80 </x>
     <y>   0.00 </y>
     <z>   0.00 </z>
     <z1> -18.83 </z1>
   </location>
 </mass_balance>

    <ground_reactions>
        <contact type="BOGEY" name="NOSE_LG">
            <location unit="IN">
                <x> 57 </x>
                <y> 0 </y>
                <z> -140 </z>
            </location>
            <static_friction> 0.8 </static_friction>
            <dynamic_friction> 0.5 </dynamic_friction>
            <rolling_friction> 0.02 </rolling_friction>
            <spring_coeff unit="LBS/FT"> 85000 </spring_coeff>
            <damping_coeff unit="LBS/FT/SEC"> 10000 </damping_coeff>
            <max_steer unit="DEG"> 80 </max_steer>
            <brake_group> NOSE </brake_group>
            <retractable>1</retractable>
        </contact>
        <contact type="BOGEY" name="LEFT_MLG">
            <location unit="IN">
                <x> 470 </x>
                <y> -98 </y>
                <z> -140 </z>
            </location>
            <static_friction> 0.8 </static_friction>
            <dynamic_friction> 0.5 </dynamic_friction>
            <rolling_friction> 0.02 </rolling_friction>
            <spring_coeff unit="LBS/FT"> 82704 </spring_coeff>
            <damping_coeff unit="LBS/FT/SEC"> 10000 </damping_coeff>
            <max_steer unit="DEG"> 0.0 </max_steer>
            <brake_group> LEFT </brake_group>
            <retractable>1</retractable>
        </contact>
        <contact type="BOGEY" name="RIGHT_MLG">
            <location unit="IN">
                <x> 470 </x>
                <y> 98 </y>
                <z> -140 </z>
            </location>
            <static_friction> 0.8 </static_friction>
            <dynamic_friction> 0.5 </dynamic_friction>
            <rolling_friction> 0.02 </rolling_friction>
            <spring_coeff unit="LBS/FT"> 82704 </spring_coeff>
            <damping_coeff unit="LBS/FT/SEC"> 10000 </damping_coeff>
            <max_steer unit="DEG"> 0.0 </max_steer>
            <brake_group> RIGHT </brake_group>
            <retractable>1</retractable>
        </contact>

<!--

  <contact type="STRUCTURE" name="LEFT_WING">
    <location unit="IN">
     <x> 451.80 </x>
     <y> -384.00 </y>
     <z> 52 </z>
    </location>
            <static_friction> 0.2 </static_friction>
            <dynamic_friction> 0.2 </dynamic_friction>
            <rolling_friction> 0.2 </rolling_friction>
            <spring_coeff unit="LBS/FT"> 10000 </spring_coeff>
            <damping_coeff unit="LBS/FT/SEC"> 2000 </damping_coeff>
  </contact>

  <contact type="STRUCTURE" name="RIGHT_WING">
    <location unit="IN">
     <x> 451.80 </x>
     <y> 384.00 </y>
     <z> 52 </z>
    </location>
            <static_friction> 0.2 </static_friction>
            <dynamic_friction> 0.2 </dynamic_friction>
            <rolling_friction> 0.2 </rolling_friction>
            <spring_coeff unit="LBS/FT"> 10000 </spring_coeff>
            <damping_coeff unit="LBS/FT/SEC"> 2000 </damping_coeff>
  </contact>
-->
    </ground_reactions>

    <propulsion>
        <engine file="F100-PW-229">
            <location unit="M">
                <x> 0 </x>
                <y> 0 </y>
                <z> 0 </z>
            </location>
            <orient unit="DEG">
                <roll> 0 </roll>
                <pitch> 0 </pitch>
                <yaw> 0 </yaw>
            </orient>
            <feed>0</feed>
            <thruster file="direct">
                <location unit="M">
                    <x> 0 </x>
                    <y> 0 </y>
                    <z> 0 </z>
                </location>
                <orient unit="DEG">
                    <roll> 0 </roll>
                    <pitch> 0 </pitch>
                    <yaw> 0 </yaw>
                </orient>
            </thruster>
        </engine>
        <engine file="F100-PW-229">
            <location unit="M">
                <x> 0 </x>
                <y> 0 </y>
                <z> 0 </z>
            </location>
            <orient unit="DEG">
                <roll> 0 </roll>
                <pitch> 0 </pitch>
                <yaw> 0 </yaw>
            </orient>
            <feed>1</feed>
            <thruster file="direct">
                <location unit="M">
                    <x> 0 </x>
                    <y> 0 </y>
                    <z> 0 </z>
                </location>
                <orient unit="DEG">
                    <roll> 0 </roll>
                    <pitch> 0 </pitch>
                    <yaw> 0 </yaw>
                </orient>
            </thruster>
        </engine>
        <tank type="FUEL">
            <location unit="M">
                <x> 0 </x>
                <x1> 0.291 </x1>
                <y> 0 </y>
                <z>0</z>
<z1> -0.68 </z1>
            </location>
            <capacity unit="KG">2136</capacity>
            <contents unit="KG">2136</contents>
        </tank>
        <tank type="FUEL">
            <location unit="M">
                <x> 0 </x>
                <x1> -0.291 </x1>
                <y> 0 </y>
                <z>0</z>
<z1> -0.58 </z1>
            </location>
            <capacity unit="KG">2000</capacity>
            <contents unit="KG">2000</contents>
        </tank>
        <tank type="FUEL">
            <location unit="M">
                <x> 0 </x>
                <x1> -1.291 </x1>
                <y> 1.98 </y>
                <z>0</z>
<z1> -0.51 </z1>
            </location>
            <capacity unit="KG">568</capacity>
            <contents unit="KG">568</contents>
        </tank>
        <tank type="FUEL">
            <location unit="M">
                <x> 0 </x>
                <x1> -1.291 </x1>
                <y> 0.98 </y>
                <z>0</z>
<z1> -0.58 </z1>
            </location>
            <capacity unit="KG">136</capacity>
            <contents unit="KG">136</contents>
        </tank>
        <tank type="FUEL">
            <location unit="M">
                <x> 0 </x>
                <x1> -1.291 </x1>
                <y> -1.98 </y>
                <z>0</z>
<z1> -0.51 </z1>
            </location>
            <capacity unit="KG">568</capacity>
            <contents unit="KG">568</contents>
        </tank>
        <tank type="FUEL">
            <location unit="M">
                <x> 0 </x>
                <x1> -1.291 </x1>
                <y> -0.98 </y>
                <z>0</z>
<z1> -0.58 </z1>
            </location>
            <capacity unit="KG">136</capacity>
            <contents unit="KG">136</contents>
        </tank>
        <tank type="FUEL">
            <location unit="M">
                <x> 0 </x>
                <x1> -1.979 </x1>
                <y> 3.52 </y>
                <z>0</z>
<z1> -0.51 </z1>
            </location>
            <capacity unit="KG">909</capacity>
            <contents unit="KG">909</contents>
        </tank>
        <tank type="FUEL">
            <location unit="M">
                <x> 0 </x>
                <x1> -1.979 </x1>
                <y> -3.52 </y>
                <z>0</z>
<z1> -0.51 </z1>
            </location>
            <capacity unit="KG">909</capacity>
            <contents unit="KG">909</contents>
        </tank>
        <tank type="FUEL">
            <location unit="M">
                <x> 0 </x>
                <x1> 1.05 </x1>
                <y> 1.41 </y>
                <z>0</z>
<z1> -2.18 </z1>
            </location>
            <capacity unit="KG">818</capacity>
            <contents unit="KG">818</contents>
        </tank>
        <tank type="FUEL">
            <location unit="M">
                <x> 0 </x>
                <x1> 1.05 </x1>
                <y> -1.41 </y>
                <z>0</z>
<z1> -2.18 </z1>
            </location>
            <capacity unit="KG">818</capacity>
            <contents unit="KG">818</contents>
        </tank>
        <tank type="FUEL">
            <location unit="M">
                <x> 0 </x>
                <x1> -1.291 </x1>
                <y> 0.98 </y>
                <z>0</z>
<z1> -0.58 </z1>
            </location>
            <capacity unit="KG">5</capacity>
            <contents unit="KG">5</contents>
        </tank>
        <tank type="FUEL">
            <location unit="M">
                <x> 0 </x>
                <x1> -1.291 </x1>
                <y> -0.98 </y>
                <z>0</z>
<z1> -0.58 </z1>
            </location>
            <capacity unit="KG">5</capacity>
            <contents unit="KG">5</contents>
        </tank>
    </propulsion>

 <flight_control name="FCS: unnamed">

  <channel name="Pitch">

   <summer name="Pitch Trim Sum">
      <input>fcs/elevator-cmd-norm</input>
      <input>fcs/pitch-trim-cmd-norm</input>
      <clipto>
        <min> -1 </min>
        <max>  1 </max>
      </clipto>
   </summer>

   <aerosurface_scale name="Elevator Control">
      <input>fcs/pitch-trim-sum</input>
      <range>
        <min> -0.35 </min>
        <max>  0.35 </max>
      </range>
      <output>fcs/elevator-pos-rad</output>
   </aerosurface_scale>

   <aerosurface_scale name="elevator normalization">
      <input>fcs/elevator-pos-rad</input>
      <domain>
        <min> -0.35 </min>
        <max>  0.35 </max>
      </domain>
      <range>
        <min> -1 </min>
        <max>  1 </max>
      </range>
      <output>fcs/elevator-pos-norm</output>
   </aerosurface_scale>

  </channel>

  <channel name="Roll">

   <summer name="Roll Trim Sum">
      <input>fcs/aileron-cmd-norm</input>
      <input>fcs/roll-trim-cmd-norm</input>
      <clipto>
        <min> -1 </min>
        <max>  1 </max>
      </clipto>
   </summer>

   <aerosurface_scale name="Left Aileron Control">
      <input>fcs/roll-trim-sum</input>
      <range>
        <min> -0.75 </min>
        <max>  0.75 </max>
      </range>
      <output>fcs/left-aileron-pos-rad</output>
   </aerosurface_scale>

   <aerosurface_scale name="Right Aileron Control">
      <input>fcs/roll-trim-sum</input>
      <range>
        <min> -0.75 </min>
        <max>  0.75 </max>
      </range>
      <output>fcs/right-aileron-pos-rad</output>
   </aerosurface_scale>

   <aerosurface_scale name="left aileron normalization">
      <input>fcs/left-aileron-pos-rad</input>
      <domain>
        <min> -0.75 </min>
        <max>  0.75 </max>
      </domain>
      <range>
        <min> -1 </min>
        <max>  1 </max>
      </range>
      <output>fcs/left-aileron-pos-norm</output>
   </aerosurface_scale>

   <aerosurface_scale name="right aileron normalization">
      <input>fcs/right-aileron-pos-rad</input>
      <domain>
        <min> -0.75 </min>
        <max>  0.75 </max>
      </domain>
      <range>
        <min> -1 </min>
        <max>  1 </max>
      </range>
      <output>fcs/right-aileron-pos-norm</output>
   </aerosurface_scale>

  </channel>

  <property value="1">fcs/yaw-damper-enable</property>
  <channel name="Yaw">

   <summer name="Rudder Command Sum">
      <input>fcs/rudder-cmd-norm</input>
      <input>fcs/yaw-trim-cmd-norm</input>
      <clipto>
        <min> -1 </min>
        <max>  1 </max>
      </clipto>
   </summer>

   <scheduled_gain name="Yaw Damper Rate">
      <input>velocities/r-aero-rad_sec</input>
      <table>
        <independentVar lookup="row">velocities/ve-kts</independentVar>
         <tableData>
            30     0.00
            60     2.00
         </tableData>
      </table>
      <gain>fcs/yaw-damper-enable</gain>
   </scheduled_gain>

   <summer name="Rudder Sum">
      <input>fcs/rudder-command-sum</input>
      <input>fcs/yaw-damper-rate</input>
      <clipto>
        <min> -1.1 </min>
        <max>  1.1 </max>
      </clipto>
   </summer>

<!-- rudder limits +/-30deg 40 deg/sec-->
<!-- stabilizer limits +/7deg 30 deg/sec-->
<aerosurface_scale name="Rudder Control">
      <input>fcs/rudder-sum</input>
      <domain>
        <min> -1.1 </min>
        <max>  1.1 </max>
      </domain>
      <range>
        <min> -0.35 </min>
        <max>  0.35 </max>
      </range>
      <output>fcs/rudder-pos-rad</output>
   </aerosurface_scale>

   <aerosurface_scale name="rudder normalization">
      <input>fcs/rudder-pos-rad</input>
      <domain>
        <min> -0.35 </min>
        <max>  0.35 </max>
      </domain>
      <range>
        <min> -1 </min>
        <max>  1 </max>
      </range>
      <output>fcs/rudder-pos-norm</output>
   </aerosurface_scale>

  </channel>

  <channel name="Flaps">
   <kinematic name="Flaps Control">
     <input>fcs/flap-cmd-norm</input>
     <traverse>
       <setting>
          <position>  0 </position>
          <time>      0 </time>
       </setting>
       <setting>
          <position> 30 </position>
          <time>      3 </time>
       </setting>
     </traverse>
     <output>fcs/flap-pos-deg</output>
   </kinematic>

   <aerosurface_scale name="flap normalization">
      <input>fcs/flap-pos-deg</input>
      <domain>
        <min>  0 </min>
        <max> 30 </max>
      </domain>
      <range>
        <min> 0 </min>
        <max> 1 </max>
      </range>
      <output>fcs/flap-pos-norm</output>
   </aerosurface_scale>
  </channel>

<!--
  <channel name="AuxiliaryFlaps">
   <kinematic name="Auxiliary Flaps Control">
     <traverse>
       <setting>
          <position>  0 </position>
          <time>      0 </time>
       </setting>
       <setting>
          <position> 40 </position>
          <time>      3 </time>
       </setting>
     </traverse>
     <output>fcs/aux-flap-pos-deg</output>
   </kinematic>

   <aerosurface_scale name="aux flap normalization">
      <input>fcs/aux-flap-pos-deg</input>
      <domain>
        <min>  0 </min>
        <max> 30 </max>
      </domain>
      <range>
        <min> 0 </min>
        <max> 1 </max>
      </range>
      <output>fcs/aux-flap-pos-deg</output>
   </aerosurface_scale>
  </channel>
-->

  <channel name="Landing Gear">
   <kinematic name="Gear Control">
     <input>gear/gear-cmd-norm</input>
     <traverse>
       <setting>
          <position> 0 </position>
          <time>     0 </time>
       </setting>
       <setting>
          <position> 1 </position>
          <time>     5 </time>
       </setting>
     </traverse>
     <output>gear/gear-pos-norm</output>
   </kinematic>

  </channel>

  <channel name="Speedbrake">
   <kinematic name="Speedbrake Control">
     <input>fcs/speedbrake-cmd-norm</input>
     <traverse>
       <setting>
          <position> 0 </position>
          <time>     0 </time>
       </setting>
       <setting>
          <position> 1 </position>
          <time>     1 </time>
       </setting>
     </traverse>
     <output>fcs/speedbrake-pos-norm</output>
   </kinematic>
</channel>

   <channel name="extra-aero">
     <!-- need %Cg in chord for moments [Xcg - Xref)/100] -->
     <summer name="cg-x-offset-chord-in">
       <input> inertia/cg-x-in</input>
       <bias> -451.80</bias>
       <output>inertia/cg-x-offset-chord-in</output>
     </summer>
     <pure_gain name="cg-x-chord-percent">
       <input>inertia/cg-x-offset-chord-in</input>
       <gain> 0.01</gain>
       <clipto>
         <min> -1 </min>
         <max> 1 </max>
       </clipto>
       <output> inertia/cg-x-mac-percent </output>
     </pure_gain>
     <fcs_function name="aero-cos-alpha">
       <function>
         <product>
           <cos>
             <property>aero/alpha-rad</property>
           </cos>
         </product>
       </function>
       <output>aero/cos-alpha</output>
     </fcs_function>

     <fcs_function name="aero-sin-alpha">
       <function>
         <product>
           <sin>
             <property>aero/alpha-rad</property>
           </sin>
         </product>
       </function>
       <output>aero/sin-alpha</output>
     </fcs_function>

     <fcs_function name="CLxzcg">
       <function>
         <product>
           <property>inertia/cg-x-mac-percent </property>
           <sum>
             <product>
               <property>aero/cos-alpha</property>
               <property>aero/force/ClBAS</property>
             </product>
             <product>
               <property>aero/sin-alpha</property>
               <property>aero/force/CdBAS</property>
             </product>
           </sum>
         </product>
       </function>
       <output>aero/force/CLxzcg</output>
     </fcs_function>
   </channel>
 </flight_control>

 <aerodynamics>

		<function name="calculations/pitch-weights-delta/mass-center-m">
		<product>
			<value>0.0254</value><!--To convert from inches to meters -->
			<property>inertia/cg-x-in</property>
		</product>
		</function>
        <function name="aero/function/kCLge">
            <description>Change_in_lift_due_to_ground_effect</description>
            <product>
                  <table>
                      <independentVar>aero/h_b-mac-ft</independentVar>
                      <tableData>
                          0.0000  1.2290
                          0.1000  1.1240
                          0.1500  1.1160
                          0.2000  1.1240
                          0.3000  1.1050
                          0.4000  1.0410
                          0.5000  1.0340
                          0.6000  1.0190
                          0.7000  1.0080
                          0.8000  1.0030
                          0.9000  1.0010
                          1.0000  1.0000
                          1.1000  1.0000
                      </tableData>
                  </table>
            </product>
        </function>
  <axis name="LIFT">
    <function name="aero/force/ClBAS">
    <description>ClBAS</description>
    <product>
          <property>aero/qbar-psf</property>
          <property>metrics/Sw-sqft</property>
          <table>
            <independentVar lookup="row">aero/alpha-deg</independentVar>
            <independentVar lookup="column">aero/beta-deg</independentVar>
            <tableData>
                               -20        -15        -10         -5          0          5         10         15         20
                 0      0.06145000 0.14705000 0.10985000 0.14555000 0.07760000 0.14555000 0.10985000 0.14705000 0.06145000
                 5      0.52863010 0.57461940 0.60240520 0.61855780 0.58134070 0.61855780 0.60240520 0.57461940 0.52863010
                 10     0.92155690 0.98087490 1.00175600 1.01945400 1.01294300 1.01945400 1.00175600 0.98087490 0.92155690
                 15     1.21358600 1.24488900 1.28440400 1.27621900 1.27894600 1.27621900 1.28440400 1.24488900 1.21358600
                 20     1.43942100 1.51540200 1.56329600 1.56967300 1.60316000 1.56967300 1.56329600 1.51540200 1.43942100
                 25     1.64045000 1.69894700 1.74000300 1.76628900 1.77442200 1.76628900 1.74000300 1.69894700 1.64045000
                 30     1.72010800 1.79044600 1.85289200 1.89813600 1.92705300 1.89813600 1.85289200 1.79044600 1.72010800
                 35     1.73303100 1.77032600 1.84075200 1.87052000 1.93010900 1.87052000 1.84075200 1.77032600 1.73303100
                 40     1.66640900 1.69172800 1.71228800 1.74812200 1.77181200 1.74812200 1.71228800 1.69172800 1.66640900
                 45     1.56719700 1.61022400 1.61718800 1.65201300 1.66898400 1.65201300 1.61718800 1.61022400 1.56719700
                 50     1.47601100 1.49990800 1.52134900 1.54679300 1.58094500 1.54679300 1.52131900 1.49990800 1.47601100
                 55     1.34635400 1.38524700 1.39456400 1.41769200 1.42736900 1.41769200 1.39456400 1.38524700 1.34635400
            </tableData>
          </table>
       </product>
    </function>
    <function name="aero/force/CLDS1">
    <description>CLDS1</description>
    <product>
          <property>aero/qbar-psf</property>
          <property>metrics/Sw-sqft</property>
          <property>fcs/spoiler-pos-deg</property>
          <table>
            <independentVar lookup="row">aero/alpha-deg</independentVar>
            <tableData>
                      0 0.01650000
                      5 0.01250000
                     10 0.01350000
                     15 0.01500000
                     20 0.01650000
                     25 0.01450000
                     30 0.01300000
                     35 0.01150000
                     40 0.00450000
                     45 0.00600000
                     50 0.00700000
                     55 0.00650000
            </tableData>
          </table>
       </product>
    </function>
    <function name="aero/force/CLDS2">
    <description>CLDS2</description>
    <product>
          <property>aero/qbar-psf</property>
          <property>metrics/Sw-sqft</property>
          <property>fcs/spoiler-pos-deg</property>
          <table>
            <independentVar lookup="row">aero/alpha-deg</independentVar>
            <tableData>
                      0 0.00650000
                      5 0.00950000
                     10 0.01150000
                     15 0.01250000
                     20 0.01200000
                     25 0.01250000
                     30 0.01250000
                     35 0.01350000
                     40 0.01200000
                     45 0.01100000
                     50 0.00800000
                     55 0.00550000
            </tableData>
          </table>
       </product>
    </function>
  </axis>

 <axis name="DRAG">
    <function name="aero/force/CdBAS">
    <description>CdBAS</description>
    <product>
          <property>aero/qbar-psf</property>
          <property>metrics/Sw-sqft</property>
          <table>
            <independentVar lookup="row">aero/alpha-deg</independentVar>
            <independentVar lookup="column">aero/beta-deg</independentVar>
            <tableData>
                               -20        -15        -10         -5          0          5         10         15         20
                 0      0.01700000 0.01705000 0.02160000 0.02295000 0.02520000 0.02295000 0.02160000 0.01705000 0.01700000
                 5      0.04338825 0.04781333 0.05320554 0.05617464 0.05818861 0.05617464 0.05320354 0.04781333 0.04338825
                 10     0.14076520 0.15650480 0.16247150 0.16777520 0.16784560 0.16777520 0.16247150 0.15650480 0.14076520
                 15     0.31166910 0.32756250 0.34487960 0.34548170 0.34631600 0.34548170 0.34487960 0.32756250 0.31166910
                 20     0.51235980 0.54320750 0.56292740 0.56514200 0.57722390 0.56514200 0.56292740 0.54320750 0.51235980
                 25     0.75231020 0.78257730 0.80420480 0.81740020 0.82113730 0.81740020 0.80420480 0.78257730 0.75221020
                 30     0.98698510 1.03105800 1.06849700 1.09583100 1.11304600 1.09583100 1.06849700 1.03105800 0.98698510
                 35     1.21140600 1.24374700 1.29458600 1.32128900 1.36258600 1.32128900 1.29458600 1.24374700 1.21140600
                 40     1.39821700 1.42475000 1.44800800 1.48316600 1.50487200 1.48316600 1.44800800 1.42475000 1.39821700
                 45     1.56330700 1.61255700 1.62553300 1.66403500 1.68355100 1.66403500 1.62553300 1.61255700 1.56330700
                 50     1.74877400 1.78230900 1.81470600 1.84961900 1.89047500 1.84961900 1.81470600 1.78230900 1.74877400
                 55     1.90570600 1.96386700 1.98249100 2.02153600 2.03465900 2.02153600 1.98249100 1.96386700 1.90570600
            </tableData>
          </table>
       </product>
    </function>
    <function name="aero/force/CdDS1">
    <description>CdDS1</description>
    <product>
          <property>aero/qbar-psf</property>
          <property>metrics/Sw-sqft</property>
          <property>fcs/spoiler-pos-deg</property>
          <table>
            <independentVar lookup="row">aero/alpha-deg</independentVar>
            <tableData>
                      0 -0.00120000
                      5 0.00030000
                     10 0.00180000
                     15 0.00400000
                     20 0.00620000
                     25 0.00750000
                     30 0.00950000
                     35 0.01050000
                     40 0.00750000
                     45 0.00900000
                     50 0.01250000
                     55 0.01400000
            </tableData>
          </table>
       </product>
    </function>
    <function name="aero/force/CdDS2">
    <description>CdDS2</description>
    <product>
          <property>aero/qbar-psf</property>
          <property>metrics/Sw-sqft</property>
          <property>fcs/spoiler-pos-deg</property>
          <table>
            <independentVar lookup="row">aero/alpha-deg</independentVar>
            <tableData>
                      0 -0.00330000
                      5 -0.00250000
                     10 -0.00100000
                     15 0.00050000
                     20 0.00200000
                     25 0.00400000
                     30 0.00600000
                     35 0.00850000
                     40 0.00950000
                     45 0.01100000
                     50 0.01050000
                     55 0.00900000
            </tableData>
          </table>
       </product>
    </function>
  </axis>
<!--
    <function name="aero/force/Drag_induced">
       <description>Induced drag</description>
         <product>
           <property>aero/qbar-psf</property>
           <property>metrics/Sw-sqft</property>
           <property>aero/cl-squared</property>
           <value>0.12</value>
         </product>
    </function>
    <function name="aero/force/Drag_mach">
       <description>Drag due to mach</description>
        <product>
          <property>aero/qbar-psf</property>
          <property>metrics/Sw-sqft</property>
          <table>
            <independentVar lookup="row">velocities/mach</independentVar>
            <tableData>
                0.00      0.000
                0.81      0.000
                1.10      0.023
                1.80      0.015
            </tableData>
          </table>
        </product>
    </function>
    <function name="aero/force/Drag_flap">
       <description>Drag due to flaps</description>
         <product>
           <property>aero/qbar-psf</property>
           <property>metrics/Sw-sqft</property>
           <property>fcs/flap-pos-deg</property>
           <value> 0.00250 </value>
         </product>
    </function>

    <function name="aero/force/Drag_gear">
       <description>Drag due to gear</description>
         <product>
           <property>aero/qbar-psf</property>
           <property>metrics/Sw-sqft</property>
           <property>gear/gear-pos-norm</property>
           <value>0.02</value>
         </product>
    </function>

    <function name="aero/force/Drag_speedbrake">
       <description>Drag due to speedbrakes</description>
         <product>
           <property>aero/qbar-psf</property>
           <property>metrics/Sw-sqft</property>
           <property>fcs/speedbrake-pos-norm</property>
           <value>0.024</value>
         </product>
    </function>
-->

  <axis name="SIDE">
    <function name="aero/force/CYBAS">
    <description>CYBAS</description>
    <product>
          <property>aero/qbar-psf</property>
          <property>metrics/Sw-sqft</property>
          <table>
            <independentVar lookup="row">aero/alpha-deg</independentVar>
            <independentVar lookup="column">aero/beta-deg</independentVar>
            <tableData>
                               -20        -15        -10         -5          0          5         10         15         20
                 0      0.29415000 0.21760000 0.14620000 0.06380000 0.00000000 -0.06380000 -0.14620000 -0.21760000 -0.29415000
                 5      0.30055000 0.22180000 0.14645000 0.07015000 0.00000000 -0.07015000 -0.14645000 -0.22180000 -0.30055000
                 10     0.28855000 0.20370000 0.14100000 0.06940000 0.00000000 -0.06940000 -0.14100000 -0.20370000 -0.28855000
                 15     0.24630000 0.16780000 0.11240000 0.05945000 0.00000000 -0.05945000 -0.11240000 -0.16780000 -0.24630000
                 20     0.20490000 0.15870000 0.10830000 0.05500000 0.00000000 -0.05500000 -0.10830000 -0.15870000 -0.20490000
                 25     0.18955000 0.15275000 0.11775000 0.06045000 0.00000000 -0.06045000 -0.11775000 -0.15275000 -0.18955000
                 30     0.21465000 0.17815000 0.13310000 0.07580000 0.00000000 -0.07580000 -0.13310000 -0.17815000 -0.21465000
                 35     0.23860000 0.18665000 0.14605000 0.07135000 0.00000000 -0.07135000 -0.14605000 -0.18665000 -0.23860000
                 40     0.25660000 0.20260000 0.14505000 0.07680000 0.00000000 -0.07680000 -0.14505000 -0.20260000 -0.25660000
                 45     0.26760000 0.22235000 0.16075000 0.09275000 0.00000000 -0.09275000 -0.16075000 -0.22235000 -0.26760000
                 50     0.27370000 0.22075000 0.15150000 0.07865000 0.00000000 -0.07865000 -0.15150000 -0.22075000 -0.27370000
                 55     0.24915000 0.19150000 0.13150000 0.07155000 0.00000000 -0.07155000 -0.13150000 -0.19150000 -0.24915000
            </tableData>
          </table>
       </product>
    </function>
<!--
    <function name="aero/force/CYP">
    <description>CYP</description>
    <product>
          <property>aero/qbar-psf</property>
          <property>metrics/Sw-sqft</property>
          <table>
            <independentVar lookup="row">aero/alpha-deg</independentVar>
            <tableData>
                      0 0.14900000
                      5 0.26860000
                     10 0.12500000
                     15 0.15960000
                     20 0.32640000
                     25 0.38000000
                     30 0.67990000
                     35 0.56030000
                     40 0.93200000
                     45 0.13920000
                     50 -0.69600000
                     55 -0.38180000
            </tableData>
          </table>
       </product>
    </function>
    <function name="aero/force/CYR">
    <description>CYR</description>
    <product>
          <property>aero/qbar-psf</property>
          <property>metrics/Sw-sqft</property>
          <table>
            <independentVar lookup="row">aero/alpha-deg</independentVar>
            <tableData>
                      0 0.56840000
                      5 0.53560000
                     10 0.49960000
                     15 0.67820000
                     20 0.52950000
                     25 0.27120000
                     30 -0.73430000
                     35 -1.31730000
                     40 -2.05310000
                     45 -0.76880000
                     50 -0.28850000
                     55 -0.12060000
            </tableData>
          </table>
       </product>
    </function>
-->
    <function name="aero/force/CYDR">
    <description>CYDR</description>
    <product>
          <property>aero/qbar-psf</property>
          <property>metrics/Sw-sqft</property>
          <property>fcs/rudder-pos-deg</property>
          <table>
            <independentVar lookup="row">aero/alpha-deg</independentVar>
            <independentVar lookup="column">aero/beta-deg</independentVar>
            <tableData>
                               -20        -15        -10         -5          0          5         10         15         20
                 0      0.00480000 0.00520000 0.00560000 0.00560000 0.00560000 0.00560000 0.00560000 0.00520000 0.00480000
                 5      0.00450000 0.00485000 0.00520000 0.00530000 0.00530000 0.00530000 0.00520000 0.00485000 0.00430000
                 10     0.00430000 0.00450000 0.00480000 0.00495000 0.00510000 0.00500000 0.00480000 0.00450000 0.00420000
                 15     0.00370000 0.00400000 0.00430000 0.00450000 0.00470000 0.00450000 0.00430000 0.00400000 0.00370000
                 20     0.00330000 0.00355000 0.00380000 0.00400000 0.00420000 0.00400000 0.00380000 0.00355000 0.00330000
                 25     0.00280000 0.00305000 0.00330000 0.00350000 0.00370000 0.00350000 0.00330000 0.00305000 0.00280000
                 30     0.00230000 0.00250000 0.00270000 0.00289000 0.00310000 0.00290000 0.00270000 0.00250000 0.00230000
                 35     0.00160000 0.00180000 0.00200000 0.00220000 0.00240000 0.00220000 0.00200000 0.00180000 0.00160000
                 40     0.00100000 0.00110000 0.00120000 0.00135000 0.00150000 0.00135000 0.00120000 0.00110000 0.00100000
                 45     0.00030000 0.00035000 0.00040000 0.00045000 0.00050000 0.00045000 0.00040000 0.00035000 0.00030000
                 50     0.00000000 0.00000000 0.00000000 0.00000000 0.00000000 0.00000000 0.00000000 0.00000000 0.00000000
                 55     0.00000000 0.00000000 0.00000000 0.00000000 0.00000000 0.00000000 0.00000000 0.00000000 0.00000000
            </tableData>
          </table>
       </product>
    </function>

    <function name="aero/force/CYDA">
    <description>CYDA</description>
    <product>
          <property>aero/qbar-psf</property>
          <property>metrics/Sw-sqft</property>
          <property>fcs/left-aileron-pos-deg</property>
          <table>
            <independentVar lookup="row">aero/alpha-deg</independentVar>
            <tableData>
                      0 -0.00095000
                      5 -0.00100000
                     10 -0.00085000
                     15 -0.00065000
                     20 -0.00030000
                     25 0.00010000
                     30 0.00060000
                     35 0.00160000
                     40 0.00240000
                     45 0.00250000
                     50 0.00255000
                     55 0.00265000
            </tableData>
          </table>
       </product>
    </function>
  </axis>

<!--The roll(L) and yaw(N) moments are due to aerodynamics only, while
   the pitch(Z), includes a thrust term. These are given by.
   L = dynamic pressure * Wing Area * Reference Span * CL
   M = dynamic pressure * Wing Area * chord * CM + ZjT
   N = dynamic pressure * Wing Area * Reference Span * CN
   -->
    <axis name="ROLL">
    <function name="aero/force/CLBAS">
    <description>CLBAS</description>
    <product>
          <property>aero/qbar-psf</property>
          <property>metrics/Sw-sqft</property>
           <table>
            <independentVar lookup="row">aero/alpha-deg</independentVar>
            <independentVar lookup="column">aero/beta-deg</independentVar>
            <tableData>
                               -20        -15        -10         -5          0          5         10         15         20
                 0      0.00950000 0.00800000 0.00600000 0.00300000 0.00000000 -0.00300000 -0.00600000 -0.00800000 -0.00950000
                 5      0.02500000 0.01700000 0.01350000 0.00650000 0.00000000 -0.00650000 -0.01350000 -0.01700000 -0.02050000
                 10     0.03100000 0.02600000 0.02100000 0.01050000 0.00000000 -0.01050000 -0.02100000 -0.02600000 -0.03100000
                 15     0.04700000 0.03650000 0.02650000 0.01350000 0.00000000 -0.01350000 -0.02650000 -0.03650000 -0.04700000
                 20     0.05500000 0.04100000 0.02700000 0.01600000 0.00000000 -0.01600000 -0.02700000 -0.04100000 -0.05500000
                 25     0.05250000 0.03933333 0.02616667 0.01483333 0.00000000 -0.01483333 -0.02616667 -0.03933333 -0.05250000
                 30     0.04900000 0.03766667 0.02533333 0.01366667 0.00000000 -0.01366667 -0.02533333 -0.03766667 -0.04900000
                 35     0.04750000 0.03600000 0.02450000 0.01250000 0.00000000 -0.01250000 -0.02450000 -0.03600000 -0.04750000
                 40     0.05200000 0.03900000 0.02550000 0.01300000 0.00000000 -0.01300000 -0.02550000 -0.03900000 -0.05200000
                 45     0.06100000 0.04600000 0.03050000 0.01500000 0.00000000 -0.01500000 -0.03050000 -0.04600000 -0.06100000
                 50     0.06450000 0.04850000 0.03300000 0.01650000 0.00000000 -0.01650000 -0.03300000 -0.04850000 -0.06450000
                 55     0.06500000 0.04950000 0.03350000 0.01650000 0.00000000 -0.01650000 -0.03350000 -0.04950000 -0.06500000
            </tableData>
          </table>
       </product>
    </function>
<!--
    <function name="aero/force/CRP">
    <description>CRP</description>
    <product>
          <property>aero/qbar-psf</property>
          <property>metrics/Sw-sqft</property>
           <property>aero/bi2vel</property>
           <property>velocities/p-aero-rad_sec</property>
          <table>
            <independentVar lookup="row">aero/alpha-deg</independentVar>
            <tableData>
                      0 -0.40160000
                      5 -0.40570000
                     10 -0.20000000
                     15 -0.08000000
                     20 -0.08000000
                     25 -0.20000000
                     30 -0.27000000
                     35 -0.22830000
                     40 -0.18630000
                     45 -0.11040000
                     50 -0.03610000
                     55 -0.08910000
            </tableData>
          </table>
       </product>
    </function>
-->
<!---
    <function name="aero/moment/Roll_damp">
       <description>Roll moment due to roll rate</description>
       <product>
           <property>aero/qbar-psf</property>
           <property>metrics/Sw-sqft</property>
           <property>metrics/bw-ft</property>
           <property>aero/bi2vel</property>
           <property>velocities/p-aero-rad_sec</property>
-->
<!---
    <function name="aero/force/CLR">
    <description>CLR</description>
    <product>
          <property>aero/qbar-psf</property>
          <property>metrics/Sw-sqft</property>
           <property>aero/bi2vel</property>
           <property>velocities/r-aero-rad_sec</property>
          <table>
            <independentVar lookup="row">aero/alpha-deg</independentVar>
            <tableData>
                      0 0.00800000
                      5 0.05220000
                     10 0.08380000
                     15 0.07890000
                     20 0.23100000
                     25 0.23840000
                     30 0.32000000
                     35 0.32000000
                     40 0.25450000
                     45 0.07250000
                     50 -0.04340000
                     55 -0.58800000
            </tableData>
          </table>
       </product>
    </function>
-->

  <function name="aero/force/CLDA">
    <description>CLDA</description>
    <product>
          <property>aero/qbar-psf</property>
          <property>metrics/Sw-sqft</property>
          <property>fcs/left-aileron-pos-deg</property>
          <table>
            <independentVar lookup="row">aero/alpha-deg</independentVar>
            <independentVar lookup="column">aero/beta-deg</independentVar>
            <tableData>
                               -20        -15        -10         -5          0          5         10         15         20
                 0      0.00079000 0.00079000 0.00079000 0.00079000 0.00079000 0.00079000 0.00079000 0.00079000 0.00079000
                 5      0.00079000 0.00079000 0.00079000 0.00079000 0.00079000 0.00079000 0.00079000 0.00079000 0.00079000
                 10     0.00079000 0.00079000 0.00079000 0.00079000 0.00079000 0.00079000 0.00079000 0.00079000 0.00079000
                 15     0.00062000 0.00066000 0.00071250 0.00077750 0.00080500 0.00077750 0.00071250 0.00066000 0.00062000
                 20     0.00048250 0.00057500 0.00066000 0.00074750 0.00075500 0.00074750 0.00066000 0.00057500 0.00048250
                 25     0.00031000 0.00046500 0.00053000 0.00060500 0.00064500 0.00060500 0.00053000 0.00046500 0.00031000
                 30     0.00023500 0.00034750 0.00039000 0.00044000 0.00048500 0.00044000 0.00039000 0.00034750 0.00023000
                 35     0.00016750 0.00022000 0.00021750 0.00021500 0.00023500 0.00021500 0.00021750 0.00022000 0.00016750
                 40     0.00009250 0.00014250 0.00012250 0.00014000 0.00012000 0.00014000 0.00012250 0.00014250 0.00009250
                 45     0.00017250 0.00013750 0.00011500 0.00011750 0.00014000 0.00011750 0.00011500 0.00013750 0.00017250
                 50     0.00014500 0.00013750 0.00018250 0.00024250 0.00022000 0.00024250 0.00018250 0.00013750 0.00014500
                 55     0.00017500 0.00021000 0.00027750 0.00033000 0.00035000 0.00033000 0.00027750 0.00021000 0.00017500
            </tableData>
          </table>
       </product>
    </function>
    <function name="aero/force/CLDR">
    <description>CLDR</description>
    <product>
          <property>aero/qbar-psf</property>
          <property>metrics/Sw-sqft</property>
          <property>fcs/rudder-pos-deg</property>
          <table>
            <independentVar lookup="row">aero/alpha-deg</independentVar>
            <independentVar lookup="column">aero/beta-deg</independentVar>
            <tableData>
                               -20        -15        -10         -5          0          5         10         15         20
                 0      0.00009600 0.00010400 0.00011200 0.00011200 0.00011200 0.00011200 0.00011200 0.00010400 0.00009600
                 5      0.00009000 0.00009700 0.00010400 0.00010400 0.00010800 0.00010600 0.00010400 0.00009700 0.00009000
                 10     0.00008400 0.00009000 0.00009600 0.00009900 0.00010200 0.00009900 0.00009600 0.00009000 0.00008400
                 15     0.00007400 0.00008000 0.00008600 0.00009000 0.00009400 0.00009000 0.00008600 0.00008000 0.00007400
                 20     0.00006600 0.00007100 0.00007600 0.00008000 0.00008400 0.00008000 0.00007600 0.00007100 0.00006600
                 25     0.00005600 0.00006100 0.00006600 0.00007000 0.00007400 0.00007000 0.00006600 0.00006100 0.00005600
                 30     0.00004500 0.00005000 0.00005400 0.00005800 0.00006200 0.00005800 0.00005400 0.00005000 0.00004600
                 35     0.00003200 0.00003600 0.00004000 0.00004400 0.00004800 0.00004400 0.00004000 0.00003600 0.00003200
                 40     0.00002000 0.00002200 0.00002400 0.00002700 0.00003000 0.00002700 0.00002400 0.00002200 0.00002000
                 45     0.00000600 0.00000700 0.00000800 0.00000900 0.00001000 0.00000900 0.00000800 0.00000700 0.00000600
                 50     0.00000000 0.00000000 0.00000000 0.00000000 0.00000000 0.00000000 0.00000000 0.00000000 0.00000000
                 55     0.00000000 0.00000000 0.00000000 0.00000000 0.00000000 0.00000000 0.00000000 0.00000000 0.00000000
            </tableData>
          </table>
       </product>
    </function>
  </axis>

  <axis name="PITCH">
    <function name="aero/force/CMBAS">
    <description>CMBAS</description>
    <product>
          <property>aero/qbar-psf</property>
          <property>metrics/Sw-sqft</property>
          <table>
            <independentVar lookup="row">aero/alpha-deg</independentVar>
            <independentVar lookup="column">aero/beta-deg</independentVar>
            <tableData>
                               -20        -15        -10         -5          0          5         10         15         20
                 0      0.06052187 0.06540000 0.06888437 0.07097500 0.07167180 0.07097500 0.06888437 0.06540000 0.06052187
                 5      0.02583125 0.03173750 0.03595625 0.03848750 0.03933125 0.03848750 0.03595625 0.03173750 0.02583125
                 10     -0.04367188 -0.02247500 -0.00733438 0.00175000 0.00477813 0.00175000 -0.00733438 -0.02247500 -0.04367188
                 15     -0.14956560 -0.10330000 -0.07025313 -0.05042500 -0.04381563 -0.05042500 -0.07025313 -0.10330000 -0.14956560
                 20     -0.17724690 -0.12441880 -0.08668438 -0.06404375 -0.05649687 -0.06404375 -0.08668438 -0.12441880 -0.17724690
                 25     -0.22480940 -0.18799370 -0.16169690 -0.14591870 -0.14065940 -0.14591870 -0.16169690 -0.18799370 -0.22480940
                 30     -0.23872500 -0.23216250 -0.22747500 -0.22466250 -0.22372500 -0.22466250 -0.22747500 -0.23216250 -0.23872500
                 35     -0.30000000 -0.30000000 -0.30000000 -0.30000000 -0.30000000 -0.30000000 -0.30000000 -0.30000000 -0.30000000
                 40     -0.34905310 -0.37213130 -0.38861560 -0.39850630 -0.40180310 -0.39850630 -0.38861560 -0.37213130 -0.34905310
                 45     -0.42481870 -0.44612500 -0.46134380 -0.47047500 -0.47351880 -0.47047500 -0.46134380 -0.44612500 -0.42481870
                 50     -0.48083130 -0.51692500 -0.54270630 -0.55817500 -0.56333130 -0.55817500 -0.54270630 -0.51692500 -0.48083130
                 55     -0.54004060 -0.58320000 -0.61402810 -0.63252500 -0.63869060 -0.63252500 -0.61402810 -0.58320000 -0.54004060
            </tableData>
          </table>
       </product>
    </function>
    <function name="aero/force/CMxzcg">
    <description>Pitching moment due to CG alpha lift/drag </description>
    <product>
          <property>aero/force/CLxzcg</property>
       </product>
    </function>

<!---
    <function name="aero/force/DCMB0">
    <description>DCMB0</description>
    <product>
          <property>aero/qbar-psf</property>
          <property>metrics/Sw-sqft</property>
          <table>
            <independentVar lookup="row">aero/alpha-deg</independentVar>
            <tableData>
                      0 -0.05500000
                      5 -0.05500000
                     10 -0.05500000
                     15 -0.05500000
                     20 -0.05500000
                     25 -0.05500000
                     30 -0.05500000
                     35 -0.05500000
                     40 -0.05500000
                     45 -0.05500000
                     50 -0.05500000
                     55 -0.05500000
            </tableData>
          </table>
       </product>
    </function>
-->
<!--
    <function name="aero/force/CMQ">
    <description>CMQ</description>
    <product>
          <property>aero/qbar-psf</property>
          <property>metrics/Sw-sqft</property>
          <table>
            <independentVar lookup="row">aero/alpha-deg</independentVar>
            <tableData>
                      0 -15.42400000
                      5 -14.12900000
                     10 -17.96700000
                     15 -22.80700000
                     20 -21.07800000
                     25 -19.62900000
                     30 -15.18500000
                     35 -1.88600000
                     40 -7.70700000
                     45 -5.47900000
                     50 -13.11300000
                     55 -10.29800000
            </tableData>
          </table>
       </product>
    </function>
    <function name="aero/force/CMDS1">
    <description>CMDS1</description>
    <product>
          <property>aero/qbar-psf</property>
          <property>metrics/Sw-sqft</property>
          <table>
            <independentVar lookup="row">aero/alpha-deg</independentVar>
            <tableData>
                      0 -0.00900000
                      5 -0.01150000
                     10 -0.01400000
                     15 -0.01550000
                     20 -0.01600000
                     25 -0.01600000
                     30 -0.01600000
                     35 -0.01450000
                     40 -0.01450000
                     45 -0.01450000
                     50 -0.01450000
                     55 -0.01200000
            </tableData>
          </table>
       </product>
    </function>
    <function name="aero/force/CMDS2">
    <description>CMDS2</description>
    <product>
          <property>aero/qbar-psf</property>
          <property>metrics/Sw-sqft</property>
          <table>
            <independentVar lookup="row">aero/alpha-deg</independentVar>
            <tableData>
                      0 -0.01950000
                      5 -0.01850000
                     10 -0.01900000
                     15 -0.01900000
                     20 -0.01700000
                     25 -0.01330000
                     30 -0.00750000
                     35 -0.00100000
                     40 0.00400000
                     45 0.00600000
                     50 0.00050000
                     55 0.00000000
            </tableData>
          </table>
       </product>
    </function>
-->

  </axis>

  <axis name="YAW">
    <function name="aero/force/CNBAS">
    <description>CNBAS</description>
    <product>
          <property>aero/qbar-psf</property>
          <property>metrics/Sw-sqft</property>
          <table>
            <independentVar lookup="row">aero/alpha-deg</independentVar>
            <independentVar lookup="column">aero/beta-deg</independentVar>
            <tableData>
                               -20        -15        -10         -5          0          5         10         15         20
                 0      -0.04000000 -0.03050000 -0.02150000 -0.01000000 0.00000000 0.01000000 0.02150000 0.03050000 0.04000000
                 5      -0.03900000 -0.03000000 -0.02150000 -0.01000000 0.00000000 0.01000000 0.02150000 0.03000000 0.03900000
                 10     -0.03600000 -0.02570000 -0.01900000 -0.00950000 0.00000000 0.00950000 0.01900000 0.02750000 0.03600000
                 15     -0.00850000 -0.00750000 -0.00600000 -0.00300000 0.00000000 0.00300000 0.00600000 0.00750000 0.00850000
                 20     0.01000000 0.00700000 0.00400000 0.00200000 0.00000000 -0.00200000 -0.00400000 -0.00700000 -0.01000000
                 25     0.02550000 0.01700000 0.00900000 0.00450000 0.00000000 -0.00450000 -0.00900000 -0.01700000 -0.02550000
                 30     0.03800000 0.02800000 0.01800000 0.01100000 0.00000000 -0.01100000 -0.01800000 -0.02800000 -0.03800000
                 35     0.04050000 0.03150000 0.02300000 0.01450000 0.00000000 -0.01450000 -0.02300000 -0.03150000 -0.04050000
                 40     0.04500000 0.02950000 0.01900000 0.00850000 0.00000000 -0.00850000 -0.01900000 -0.02950000 -0.04050000
                 45     0.04150000 0.03150000 0.02150000 0.01300000 0.00000000 -0.01300000 -0.02150000 -0.03150000 -0.04150000
                 50     0.03600000 0.02800000 0.02050000 0.01450000 0.00000000 -0.01450000 -0.02050000 -0.02800000 -0.03600000
                 55     0.02600000 0.02200000 0.01750000 0.01450000 0.00000000 -0.01450000 -0.01750000 -0.02200000 -0.02600000
            </tableData>
          </table>
       </product>
    </function>

   <function name="aero/force/DCNDS">
    <description>DCNDS</description>
    <product>
          <property>aero/qbar-psf</property>
          <property>metrics/Sw-sqft</property>
          <property>fcs/spoiler-pos-deg</property>
          <table>
            <independentVar lookup="row">aero/alpha-deg</independentVar>
            <tableData>
                      0 0.00011700
                      5 0.00011700
                     10 0.00015000
                     15 0.00018300
                     20 0.00021700
                     25 0.00025000
                     30 0.00026700
                     35 0.00013300
                     40 0.00008300
                     45 0.00005000
                     50 0.00005000
                     55 0.00005000
            </tableData>
          </table>
       </product>
    </function>
<!--
    <function name="aero/force/CNP">
    <description>CNP</description>
    <product>
          <property>aero/qbar-psf</property>
          <property>metrics/Sw-sqft</property>
          <table>
            <independentVar lookup="row">aero/alpha-deg</independentVar>
            <tableData>
                      0 -0.03330000
                      5 -0.09470000
                     10 -0.10680000
                     15 -0.11890000
                     20 -0.13100000
                     25 -0.08000000
                     30 -0.01160000
                     35 0.14210000
                     40 0.10070000
                     45 -0.02980000
                     50 -0.09580000
                     55 -0.01340000
            </tableData>
          </table>
       </product>
    </function>
-->
<!--
    <function name="aero/force/CNR">
    <description>CNR</description>
    <product>
          <property>aero/qbar-psf</property>
          <property>metrics/Sw-sqft</property>
          <table>
            <independentVar lookup="row">aero/alpha-deg</independentVar>
            <tableData>
                      0 -0.11540000
                      5 -0.12560000
                     10 -0.13800000
                     15 -0.20480000
                     20 -0.18970000
                     25 -0.19180000
                     30 -0.19720000
                     35 -0.29110000
                     40 -0.14490000
                     45 -0.04580000
                     50 0.04550000
                     55 -0.04410000
            </tableData>
          </table>
       </product>
    </function>
-->
    <function name="aero/force/CNDA">
    <description>CNDA</description>
    <product>
          <property>aero/qbar-psf</property>
          <property>metrics/Sw-sqft</property>
          <property>fcs/left-aileron-pos-deg</property>
          <table>
            <independentVar lookup="row">aero/alpha-deg</independentVar>
            <tableData>
                      0 0.00025000
                      5 0.00025000
                     10 0.00017500
                     15 0.00007500
                     20 -0.00005000
                     25 -0.00022500
                     30 -0.00037500
                     35 -0.00052500
                     40 -0.00070000
                     45 -0.00082500
                     50 -0.00085000
                     55 -0.00092500
            </tableData>
          </table>
       </product>
    </function>
  <function name="aero/force/CNDR">
    <description>CNDR</description>
    <product>
          <property>aero/qbar-psf</property>
          <property>metrics/Sw-sqft</property>
          <property>fcs/rudder-pos-deg</property>
          <table>
            <independentVar lookup="row">aero/alpha-deg</independentVar>
            <independentVar lookup="column">aero/beta-deg</independentVar>
            <tableData>
                               -20        -15        -10         -5          0          5         10         15         20
                 0      -0.00103000 -0.00115000 -0.00127000 -0.00142000 -0.00158000 -0.00142000 -0.00127000 -0.00115000 -0.00103000
                 5      -0.00104000 -0.00118000 -0.00130000 -0.00140000 -0.00150000 -0.00140000 -0.00130000 -0.00118000 -0.00107000
                 10     -0.00102000 -0.00114000 -0.00127000 -0.00135000 -0.00144000 -0.00135000 -0.00127000 -0.00114000 -0.00102000
                 15     -0.00085000 -0.00102000 -0.00120000 -0.00130000 -0.00140000 -0.00130000 -0.00120000 -0.00102000 -0.00085000
                 20     -0.00063000 -0.00085000 -0.00107000 -0.00120000 -0.00134000 -0.00120000 -0.00107000 -0.00085000 -0.00063000
                 25     -0.00048000 -0.00066000 -0.00084000 -0.00098000 -0.00112000 -0.00098000 -0.00084000 -0.00066000 -0.00048000
                 30     -0.00042000 -0.00054000 -0.00067000 -0.00072000 -0.00077000 -0.00072000 -0.00067000 -0.00054000 -0.00042000
                 35     -0.00033000 -0.00035000 -0.00037000 -0.00044000 -0.00052000 -0.00044000 -0.00037000 -0.00035000 -0.00033000
                 40     -0.00020000 -0.00020000 -0.00020000 -0.00024000 -0.00029000 -0.00024000 -0.00020000 -0.00020000 -0.00020000
                 45     -0.00004000 -0.00004000 -0.00004000 -0.00007000 -0.00011000 -0.00007000 -0.00004000 -0.00004000 -0.00004000
                 50     0.00000000 0.00000000 0.00000000 0.00000000 0.00000000 0.00000000 0.00000000 0.00000000 0.00000000
                 55     0.00000000 0.00000000 0.00000000 0.00000000 0.00000000 0.00000000 0.00000000 0.00000000 0.00000000
            </tableData>
          </table>
       </product>
    </function>
  </axis>

 </aerodynamics>

 <external_reactions>
 </external_reactions>

  <output name="c:/users/richard/dev/flightgear/aircraft/f-14b/JSBOut.csv" type="CSV" rate="10">
    <simulation> ON </simulation>
    <atmosphere> ON </atmosphere>
    <massprops> ON </massprops>
    <aerosurfaces> ON </aerosurfaces>
    <rates> ON </rates>
    <velocities> ON </velocities>
    <forces> ON </forces>
    <moments> ON </moments>
    <position> ON </position>
    <coefficients> ON </coefficients>
    <ground_reactions> ON </ground_reactions>
    <fcs> ON </fcs>
    <propulsion> ON </propulsion>
    <property>aero/alpha-rad</property>
    <property>velocities/vc-kts</property>
    <property>aero/force/CLxzcg</property>
    <property>/fdm/jsbsim/propulsion/engine/thrust-lbs</property>
    <property>/fdm/jsbsim/propulsion/engine/fuel-flow-rate-gph</property>
    <property>/fdm/jsbsim/propulsion/engine/fuel-used-lbs</property>
    <property>/fdm/jsbsim/propulsion/engine/n1</property>
    <property>/fdm/jsbsim/propulsion/engine[1]/thrust-lbs</property>
    <property>/fdm/jsbsim/propulsion/engine[1]/fuel-flow-rate-gph</property>
    <property>/fdm/jsbsim/propulsion/engine[1]/fuel-used-lbs</property>
    <property>/fdm/jsbsim/propulsion/engine[1]/n1</property>
    <property>inertia/cg-x-mac-percent </property>
    <property>aero/cos-alpha</property>
    <property>aero/force/ClBAS</property>
    <property>aero/sin-alpha</property>
    <property>aero/force/CdBAS</property>
  </output>
</fdm_config>
